<?xml version="1.0" encoding="UTF-8"?>
<channelml xmlns="http://morphml.org/channelml/schema" xmlns:xsi="http://www.w3.org/2001/XMLSchema-instance" xmlns:meta="http://morphml.org/metadata/schema" xsi:schemaLocation="http://morphml.org/channelml/schema  http://www.neuroml.org/NeuroMLValidator/NeuroMLFiles/Schemata/v1.8.1/Level2/ChannelML_v1.8.1.xsd" units="SI Units">

    <meta:notes>NeuroML file containing a single Potassium Channel description, from the Hippocampal CA3 neuron model presented in Traub et al., 1991.</meta:notes>

    <channel_type name="Kdr_pyr" density="yes">

        <status value="stable">
            <meta:comment>Transcribed from the Genesis implementation of David Beeman</meta:comment>
            <meta:comment>Added extra scaling factor of 0.5 as used in protodefs.g</meta:comment>
            <meta:contributor>
                <meta:name>Padraig Gleeson</meta:name>
            </meta:contributor>
            <meta:contributor>
                <meta:name>Boris Marin</meta:name>
            </meta:contributor>
        </status>

        <meta:notes>NeuroML file containing a single Potassium Channel description, from the Hippocampal CA3 neuron model presented in Traub et al., 1991.</meta:notes>

        <meta:authorList>
            <meta:modelTranslator>
                <meta:name>Padraig Gleeson</meta:name>
                <meta:institution>UCL</meta:institution>
                <meta:email>p.gleeson - at - ucl.ac.uk</meta:email>
            </meta:modelTranslator>
            <meta:modelTranslator>
                <meta:name>Boris Marin</meta:name>
                <meta:institution>UCL</meta:institution>
                <meta:email>b.marin - at - ucl.ac.uk</meta:email>
            </meta:modelTranslator>
        </meta:authorList>

        <meta:publication>
            <meta:fullTitle>Traub, R. D., Wong, R. K., Miles, R., and Michelson, H. (1991). A model of a CA3 hippocampal pyramidal neuron incorporating voltage-clamp data on intrinsic conductances. Journal of neurophysiology, 66(2), 635-50.</meta:fullTitle>
            <meta:pubmedRef>http://www.ncbi.nlm.nih.gov/pubmed/1663538</meta:pubmedRef>
        </meta:publication>

        <meta:neuronDBref>
            <meta:modelName>K channels</meta:modelName>
            <meta:uri>http://senselab.med.yale.edu/neurondb/NeuronProp.aspx?id=259&amp;mo=1&amp;re=&amp;pr=C</meta:uri>
        </meta:neuronDBref>

        <current_voltage_relation cond_law="ohmic" ion="k" default_erev="-0.075" default_gmax="4.98e-07">

            <gate name="n" instances="1">
                <closed_state id="n0"/>
                <open_state id="n"/>

                <!--  Added extra scaling factor of 0.5 as used in protodefs.g -->
                <transition name="alpha" from="n0" to="n" expr_form="exp_linear" rate="40" scale="5e-3" midpoint="-2.49e-2"/>
                <transition name="beta" from="n" to="n0" expr_form="exponential" rate="125" scale="-4e-2" midpoint="-4e-2"/>
            </gate>

        </current_voltage_relation>

	<impl_prefs>
	  <table_settings max_v="0.05" min_v="-0.1" table_divisions="3000"/>
	</impl_prefs>

    </channel_type>
</channelml>
