<?xml version="1.0" encoding="UTF-8"?>
<channelml xmlns="http://morphml.org/channelml/schema" xmlns:xsi="http://www.w3.org/2001/XMLSchema-instance" xmlns:meta="http://morphml.org/metadata/schema" xsi:schemaLocation="http://morphml.org/channelml/schema  http://www.neuroml.org/NeuroMLValidator/NeuroMLFiles/Schemata/v1.8.1/Level2/ChannelML_v1.8.1.xsd" units="SI Units">

    <meta:notes>NeuroML file containing a single Sodium Channel description, from the book Neuronal Networks of the Hippocampus, Traub and Miles 1991</meta:notes>

    <channel_type name="Na_bask" density="yes">

        <status value="stable">
            <meta:comment>Transcribed from the Genesis implementation of David Beeman</meta:comment>
            <meta:comment>Added extra scaling factor of 2 as used in protodefs.g</meta:comment>
            <meta:contributor>
                <meta:name>Padraig Gleeson</meta:name>
            </meta:contributor>
            <meta:contributor>
                <meta:name>Boris Marin</meta:name>
            </meta:contributor>
        </status>

        <meta:notes>NeuroML file containing a single Sodium Channel description, from the book Neuronal Networks of the Hippocampus, Traub and Miles 1991</meta:notes>

        <meta:authorList>
            <meta:modelTranslator>
                <meta:name>Padraig Gleeson</meta:name>
                <meta:institution>UCL</meta:institution>
                <meta:email>p.gleeson - at - ucl.ac.uk</meta:email>
            </meta:modelTranslator>
            <meta:modelTranslator>
                <meta:name>Boris Marin</meta:name>
                <meta:institution>UCL</meta:institution>
                <meta:email>b.marin - at - ucl.ac.uk</meta:email>
            </meta:modelTranslator>
        </meta:authorList>

        <meta:publication>
            <meta:fullTitle>Traub, R. D., &amp; Miles, R. (1991). Neuronal Networks of the Hippocampus. Cambridge University Press.</meta:fullTitle>
            <meta:pubmedRef>http://www.cambridge.org/us/academic/subjects/life-sciences/neuroscience/neuronal-networks-hippocampus</meta:pubmedRef>
        </meta:publication>

        <meta:neuronDBref>
            <meta:modelName>Na channels</meta:modelName>
            <meta:uri>http://senselab.med.yale.edu/neurondb/NeuronProp.aspx?id=259&amp;mo=1&amp;re=&amp;pr=C</meta:uri>
        </meta:neuronDBref>

        <current_voltage_relation cond_law="ohmic" ion="na" default_erev="0.05" default_gmax="0">

            <gate name="m" instances="3">
                <closed_state id="m0"/>
                <open_state id="m"/>

                <!-- <transition name="alpha" from="m0" to="m" expr_form="generic" expr="(-320000.0*v - 16000.0)/(3.72665317207867e-6* (exp (-250.0*v)) - 1.0)"/>   -->

                <!-- PG: Added extra scaling factor of 2 as used in protodefs.g -->
                <transition name="alpha" from="m0" to="m" expr_form="exp_linear" rate="2560" scale="4e-3" midpoint="-5e-2"/>

                <!-- <transition name="beta" from="m" to="m0" expr_form="generic" expr="(280000.0*v + 6440.0)/(99.4843156419338* (exp (200.0*v)) - 1.0)"/>   -->

                <!-- PG: Added extra scaling factor of 2 as used in protodefs.g -->
                <transition name="beta" from="m" to="m0" expr_form="exp_linear" rate="2800" scale="-5e-3" midpoint="-2.3e-2"/>
            </gate>

            <gate name="h" instances="1">
                <closed_state id="h0"/>
                <open_state id="h"/>

                <transition name="alpha" from="h0" to="h" expr_form="generic" expr="2 * 9.93908245804491 * (exp (-55.5555555555556*v))"/>
                <transition name="beta" from="h" to="h0" expr_form="generic" expr="2 * 4000.0/(0.0100518357446336* (exp (-200.0*v)) + 1.0)"/>
            </gate>

        </current_voltage_relation>

	<impl_prefs>
	  <table_settings max_v="0.05" min_v="-0.1" table_divisions="3000"/>
	</impl_prefs>

    </channel_type>
</channelml>
