<?xml version="1.0" encoding="UTF-8"?>
<networkml xmlns="http://morphml.org/networkml/schema" xmlns:meta="http://morphml.org/metadata/schema" xmlns:xsi="http://www.w3.org/2001/XMLSchema-instance" xsi:schemaLocation="http://morphml.org/networkml/schema  http://www.neuroml.org/NeuroMLValidator/NeuroMLFiles/Schemata/v1.8.1/Level3/NetworkML_v1.8.1.xsd" lengthUnits="micrometer">

<meta:notes>

Network structure (NeuroML 1.x) for project: ACnet2 saved with neuroConstruct v1.7.0 on: 12:09:28, 23-Oct-13

Cell Group: pyramidals contains 1 cells
Cell Group: baskets contains 1 cells

</meta:notes>

<meta:properties>
    <meta:property tag="neuroConstruct_random_seed" value="-1378144166"/>

    <meta:property tag="neuroConstruct_sim_config" value="Default Simulation Configuration"/>

    <meta:property tag="neuroConstruct_sim_duration" value="700.0"/>

    <meta:property tag="neuroConstruct_sim_time_step" value="0.0025"/>

    <meta:property tag="neuroConstruct_temperature" value="6.3"/>
</meta:properties>

        <populations>
    <population name="pyramidals" cell_type="pyr_4_sym">
        <meta:properties>

        </meta:properties>
        <instances size="1">
            <instance id="0">
                <location x="400.0" y="-200.0" z="0.0"/>
            </instance>
        </instances>
    </population>
    <population name="baskets" cell_type="bask">
        <meta:properties>

        </meta:properties>
        <instances size="1">
            <instance id="0">
                <location x="0.0" y="0.0" z="0.0"/>
            </instance>
        </instances>
    </population>
</populations>

            <!--There are no synaptic connections present in the network-->

        <inputs units="SI Units">
    <input name="Input_1">
        <pulse_input delay="0.1" duration="0.5" amplitude="6.0E-10"/>
        <target population="pyramidals">
            <sites size="1">
                <site cell_id="0" segment_id="0" fraction_along="0.5"/>
            </sites>
        </target>
    </input>
    <input name="Input_0">
        <pulse_input delay="0.1" duration="0.5" amplitude="1.0E-10"/>
        <target population="baskets">
            <sites size="1">
                <site cell_id="0" segment_id="0" fraction_along="0.5"/>
            </sites>
        </target>
    </input>
</inputs>

</networkml>
