<Lems xmlns="http://www.neuroml.org/lems/0.7.2" xmlns:xsi="http://www.w3.org/2001/XMLSchema-instance" xsi:schemaLocation="http://www.neuroml.org/lems/0.7.2  https://raw.github.com/LEMS/LEMS/development/Schemas/LEMS/LEMS_v0.7.2.xsd">

    <Target component="sim1" reportFile="simulator.props" timesFile="time.dat"/>

        <!--Include standard NeuroML 2 ComponentType definitions-->

    <Include file="Cells.xml"/>
    <Include file="Networks.xml"/>
    <Include file="Simulation.xml"/>

        <!--Include the generated NeuroML 2 files-->

        <!--   Channel/synapse files-->
    <Include file="Ca_conc.nml"/>
    <Include file="Ca_pyr.channel.nml"/>
    <Include file="Kahp_pyr.channel.nml"/>
    <Include file="Kdr_bask.channel.nml"/>
    <Include file="Kdr_pyr.channel.nml"/>
    <Include file="LeakConductance_bask.channel.nml"/>
    <Include file="LeakConductance_pyr.channel.nml"/>
    <Include file="Na_bask.channel.nml"/>
    <Include file="Na_pyr.channel.nml"/>
        <!--   Cell files-->
    <Include file="bask_soma.cell.nml"/>
    <Include file="pyr_4_sym_soma.cell.nml"/>
        <!--   Network file-->
    <Include file="ACnet2.net.nml"/>

        <!--Note: this could be: Simulation id="sim1" ... , but Component type="Simulation" ...
        is used to allow validation of this file according to the LEMS schema specified above...-->
    <Component type="Simulation" id="sim1" length="700.0ms" step="0.025ms" target="network_ACnet2">

        <Display id="basket_soma_v" title="ACnet2: TestSoma, basket_soma, VOLTAGE" xmin="-0.07" xmax="0.77000004" ymin="-0.104" ymax="0.064" timeScale="1s">
            <Line id="VOLTAGE-basket_soma_0" timeScale="1s" quantity="basket_soma/0/bask_soma/v" scale="1 V" color="#000000"/>
        </Display>

        <Display id="pyramidal_soma_v" title="ACnet2: TestSoma, pyramidal_soma, VOLTAGE" xmin="-0.07" xmax="0.77000004" ymin="-0.104" ymax="0.064" timeScale="1s">
            <Line id="VOLTAGE-pyramidal_soma_0" timeScale="1s" quantity="pyramidal_soma/0/pyr_4_sym_soma/v" scale="1 V" color="#000000"/>
        </Display>

        <Display id="GraphWin_12" title="ACnet2: TestSoma, pyramidal_soma, Ca_conc:CONC:ca" xmin="-0.07" xmax="0.77000004" ymin="-3.0000002" ymax="33.0" timeScale="1s">
            <Line id="Ca_conc_CONC_ca-pyramidal_soma_0" timeScale="1s" quantity="pyramidal_soma/0/pyr_4_sym_soma/caConc" scale="1 mol_per_m3" color="#000000"/>
        </Display>

        <OutputFile id="basket_soma_v_OF" fileName="basket_soma_0.dat">
            <OutputColumn id="v" quantity="basket_soma/0/bask_soma/v"/>
        </OutputFile>

        <OutputFile id="pyramidal_soma_v_OF" fileName="pyramidal_soma_0.dat">
            <OutputColumn id="v" quantity="pyramidal_soma/0/pyr_4_sym_soma/v"/>
        </OutputFile>

        <OutputFile id="pyramidals_ca_2_OF" fileName="pyramidal_soma_0.Ca_conc_CONC_ca.dat">
            <OutputColumn id="caConc" quantity="pyramidal_soma/0/pyr_4_sym_soma/caConc"/>
        </OutputFile>
    </Component>

</Lems>
