<Lems xmlns="http://www.neuroml.org/lems/0.7.2" xmlns:xsi="http://www.w3.org/2001/XMLSchema-instance" xsi:schemaLocation="http://www.neuroml.org/lems/0.7.2  https://raw.githubusercontent.com/LEMS/LEMS/development/Schemas/LEMS/LEMS_v0.7.2.xsd">

    <Target component="sim1" reportFile="simulator.props" timesFile="time.dat"/>

        <!--Include standard NeuroML 2 ComponentType definitions-->

    <Include file="Cells.xml"/>
    <Include file="Networks.xml"/>
    <Include file="Simulation.xml"/>

        <!--Include the generated NeuroML 2 files-->

    <Include file="BasketCell.net.nml"/>

        <!--Note: this could be: Simulation id="sim1" ... , but Component type="Simulation" ...
        is used to allow validation of this file according to the LEMS schema specified above...-->
    <Component type="Simulation" id="sim1" length="700.0ms" step="0.0025ms" target="network_ACnet2">

        <Display id="baskets_v" title="ACnet2: Default Simulation Configuration, baskets, VOLTAGE, VOLTAGE" xmin="-0.07" xmax="0.77000004" ymin="-0.104" ymax="0.064" timeScale="1s">
            <Line id="baskets_0_0 v" timeScale="1s" quantity="baskets/0/bask/0/v" scale="1 V" color="#000000"/>

            <Line id="baskets_0_1 v" timeScale="1s" quantity="baskets/0/bask/1/v" scale="1 V" color="#ff0000"/>
        </Display>

        <OutputFile id="baskets_v_0_0_OF" fileName="baskets_0.0.dat">
            <OutputColumn id="v" quantity="baskets/0/bask/0/v"/>
        </OutputFile>

        <OutputFile id="baskets_v_0_1_OF" fileName="baskets_0.1.dat">
            <OutputColumn id="v" quantity="baskets/0/bask/1/v"/>
        </OutputFile>

    </Component>

</Lems>
