<Lems>

    <!--

        This LEMS file has been automatically generated using PyNeuroML v0.1.7 (libNeuroML v0.2.12)

     -->

    <!-- Specify which component to run -->
    <Target component="sim_StimuliTest"/>

    <!-- Include core NeuroML2 ComponentType definitions -->
    <Include file="Cells.xml"/>
    <Include file="Networks.xml"/>
    <Include file="Simulation.xml"/>

    <Include file="StimuliTest.nml"/>
    <Include file="pyr_4_sym.cell.nml"/>
    <Include file="Ca_conc.nml"/>
    <Include file="Ca_pyr.channel.nml"/>
    <Include file="Kahp_pyr.channel.nml"/>
    <Include file="Kdr_pyr.channel.nml"/>
    <Include file="LeakConductance_pyr.channel.nml"/>
    <Include file="Na_pyr.channel.nml"/>

    <Simulation id="sim_StimuliTest" length="1000ms" step="0.01ms" target="StimuliTest_network">

        <Display id="DispPop__PoissonFiringSynCells" title="Voltages of DispPop__PoissonFiringSynCells" timeScale="1ms" xmin="-100.0" xmax="1100.0" ymin="-90" ymax="50">
            <Line id="v PoissonFiringSynCells_0__v" quantity="PoissonFiringSynCells[0]/v" scale="1mV" color="#f7697f" timeScale="1ms"/>
            <Line id="v PoissonFiringSynCells_1__v" quantity="PoissonFiringSynCells[1]/v" scale="1mV" color="#70d3da" timeScale="1ms"/>
            <Line id="v PoissonFiringSynCells_2__v" quantity="PoissonFiringSynCells[2]/v" scale="1mV" color="#01eaf6" timeScale="1ms"/>
        </Display>

        <Display id="DispPop__SpikeArrayCells" title="Voltages of DispPop__SpikeArrayCells" timeScale="1ms" xmin="-100.0" xmax="1100.0" ymin="-90" ymax="50">
            <Line id="v SpikeArrayCells_0__v" quantity="SpikeArrayCells[0]/v" scale="1mV" color="#e935b8" timeScale="1ms"/>
            <Line id="v SpikeArrayCells_1__v" quantity="SpikeArrayCells[1]/v" scale="1mV" color="#f073ee" timeScale="1ms"/>
            <Line id="v SpikeArrayCells_2__v" quantity="SpikeArrayCells[2]/v" scale="1mV" color="#950cdd" timeScale="1ms"/>
        </Display>

        <Display id="DispPop__SpikeGeneratorPoissonCells" title="Voltages of DispPop__SpikeGeneratorPoissonCells" timeScale="1ms" xmin="-100.0" xmax="1100.0" ymin="-90" ymax="50">
            <Line id="v SpikeGeneratorPoissonCells_0__v" quantity="SpikeGeneratorPoissonCells[0]/v" scale="1mV" color="#abeb95" timeScale="1ms"/>
            <Line id="v SpikeGeneratorPoissonCells_1__v" quantity="SpikeGeneratorPoissonCells[1]/v" scale="1mV" color="#157cf9" timeScale="1ms"/>
            <Line id="v SpikeGeneratorPoissonCells_2__v" quantity="SpikeGeneratorPoissonCells[2]/v" scale="1mV" color="#c43818" timeScale="1ms"/>
        </Display>

        <Display id="DispPop__TimedSynapticInputCells" title="Voltages of DispPop__TimedSynapticInputCells" timeScale="1ms" xmin="-100.0" xmax="1100.0" ymin="-90" ymax="50">
            <Line id="v TimedSynapticInputCells_0__v" quantity="TimedSynapticInputCells[0]/v" scale="1mV" color="#3c9f90" timeScale="1ms"/>
            <Line id="v TimedSynapticInputCells_1__v" quantity="TimedSynapticInputCells[1]/v" scale="1mV" color="#07e36d" timeScale="1ms"/>
            <Line id="v TimedSynapticInputCells_2__v" quantity="TimedSynapticInputCells[2]/v" scale="1mV" color="#c9ed02" timeScale="1ms"/>
        </Display>

        <OutputFile id="Volts_file__PoissonFiringSynCells" fileName="sim_StimuliTest.PoissonFiringSynCells.v.dat">
            <OutputColumn id="v_PoissonFiringSynCells_0__v" quantity="PoissonFiringSynCells[0]/v"/>
            <OutputColumn id="v_PoissonFiringSynCells_1__v" quantity="PoissonFiringSynCells[1]/v"/>
            <OutputColumn id="v_PoissonFiringSynCells_2__v" quantity="PoissonFiringSynCells[2]/v"/>
        </OutputFile>

        <OutputFile id="Volts_file__SpikeArrayCells" fileName="sim_StimuliTest.SpikeArrayCells.v.dat">
            <OutputColumn id="v_SpikeArrayCells_0__v" quantity="SpikeArrayCells[0]/v"/>
            <OutputColumn id="v_SpikeArrayCells_1__v" quantity="SpikeArrayCells[1]/v"/>
            <OutputColumn id="v_SpikeArrayCells_2__v" quantity="SpikeArrayCells[2]/v"/>
        </OutputFile>

        <OutputFile id="Volts_file__SpikeGeneratorPoissonCells" fileName="sim_StimuliTest.SpikeGeneratorPoissonCells.v.dat">
            <OutputColumn id="v_SpikeGeneratorPoissonCells_0__v" quantity="SpikeGeneratorPoissonCells[0]/v"/>
            <OutputColumn id="v_SpikeGeneratorPoissonCells_1__v" quantity="SpikeGeneratorPoissonCells[1]/v"/>
            <OutputColumn id="v_SpikeGeneratorPoissonCells_2__v" quantity="SpikeGeneratorPoissonCells[2]/v"/>
        </OutputFile>

        <OutputFile id="Volts_file__TimedSynapticInputCells" fileName="sim_StimuliTest.TimedSynapticInputCells.v.dat">
            <OutputColumn id="v_TimedSynapticInputCells_0__v" quantity="TimedSynapticInputCells[0]/v"/>
            <OutputColumn id="v_TimedSynapticInputCells_1__v" quantity="TimedSynapticInputCells[1]/v"/>
            <OutputColumn id="v_TimedSynapticInputCells_2__v" quantity="TimedSynapticInputCells[2]/v"/>
        </OutputFile>

    </Simulation>

</Lems>
