<?xml version="1.0" encoding="ISO-8859-1"?>
<neuroml xmlns="http://www.neuroml.org/schema/neuroml2" xmlns:xsi="http://www.w3.org/2001/XMLSchema-instance" xsi:schemaLocation="http://www.neuroml.org/schema/neuroml2 https://raw.github.com/NeuroML/NeuroML2/development/Schemas/NeuroML2/NeuroML_v2beta3.xsd" id="LeakConductance_bask">

    <notes>ChannelML file containing a single Channel description</notes>

    <ionChannel id="LeakConductance_bask" conductance="10pS" type="ionChannelPassive">

        <notes>ChannelML file containing a single Channel description</notes>

    </ionChannel>

</neuroml>
